# Angaben:
M_N := 80
n_N := 2800/60 = 46.6667
L_A := 0.02
U_AN := 400
I_AN := 80
R_A := 2
Φ == const
M_L == const
T_A := L_A/R_A = 0.01
K_P := 1/R_A = 0.5
U_AN == c*n_N - R_A*I_AN solve, c →  # error: Keine Lösung gefunden.
T_i := □  # error: Fehlender Term oder Ausdruck.
M_L := □  # error: Fehlender Term oder Ausdruck.
k := □  # error: Fehlender Term oder Ausdruck.
400 - 80*2 = 240
Φ := □  # error: Fehlender Term oder Ausdruck.
240/46.66666 = 5.14286
U*0.5/(s*0.01 + 1) == 80 solve, U → 1.6*s + 160.0
1.6*s + 160.0 invlaplace → 160.0*Δ(t) + 1.6*Δ(1, t)
240/(2800/60) = 5.14286
M_N == c/(2*π)*ϕ*I_AN
c/(2*π)*ϕ == k_1
2800/60 = 46.6667
M_N == k_1*I_AN
80 == k_1*80 solve, k_1 → 1
I_AN == (U_N - U_q)*1/R_A
U_q == c_2*ϕ*n
I_AN == (U_N - c_2*ϕ*n_N)*1/R
c_2*ϕ == k_2
80 == (400 - k_2*2800/60)*1/2 solve, k_2 → 36/7 = 5.14286
